ORIGIN := 1
f(x) := x^4 - 9*x^3 - 14*x^2 + 50*x - 600
x := [10; 12; 14; 16]
D1 := (f(x[4]) - f(x[1]))*(x[4] - x[2])*(x[4] - x[3])/(x[4] - x[1]) = 34384
D2 := (f(x[4]) - f(x[2]))*(x[4] - x[3])*(x[4] - x[1])/(x[4] - x[2]) = 66360
D3 := (f(x[4]) - f(x[3]))*(x[4] - x[1])*(x[4] - x[2])/(x[4] - x[3]) = 170544
Q_num := (x[4] - x[1])*(x[4] - x[2])*(x[4] - x[3]) = 48
Lin(x) := x[4] - f(x[4])*Q_num/(D1 + D2 + D3)
Lin(x) = 11.5257
h := 0.1
n := 4
i := 1 .. n
x := [0; 0.1; 0.2; 0.3]
y0(x) := 1
y1(x) := y0(0) + integral(y0(t) + t, t = 0 .. x)
y2(x) := y0(0) + integral(y1(t) + t, t = 0 .. x)
y3(x) := y0(0) + integral(y2(t) + t, t = 0 .. x)
y0(x[1]) = 1
y0(x[3]) = 1
y0(x[4]) = 1
y0(x[2]) = 1
y1(x[1]) = 1
y1(x[3]) = 1.22
y1(x[4]) = 1.345
y1(x[2]) = 1.105
y2(x[1]) = 1
y2(x[2]) = 1.11017
y2(x[3]) = 1.24133
y2(x[4]) = 1.3945
y3(x[2]) = 1.11034
y3(x[1]) = 1
y3(x[3]) = 1.24273
y3(x[4]) = 1.39934
